*HEADING
SDT FEMLink abaqus write on 20-Nov-2017 at 11h13:14
** $Revision: 1.360 $  $Date: 2017/11/17 17:33:35 $
*NODE, NSET=ALLNODES, SYSTEM=R
 1,  0.00000000,  0.00000000,  0.00000000
 2,  0.00000000,  0.00000000,  0.15000000
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** Group 1 MatId 1 ProId 3
*ELEMENT, TYPE=S4, ELSET=Set_1_3
1 ,1 ,2 ,6 ,5
2 ,5 ,6 ,8 ,7
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** Group 2 MatId 1 ProId 1
*ELEMENT, TYPE=S4, ELSET=Set_1_1
12 ,24 ,26 ,28 ,27
13 ,27 ,28 ,30 ,29
14 ,29 ,30 ,32 ,31
** Group 3 MatId 1 ProId 1
*ELEMENT, TYPE=S4, ELSET=Set_1_1
15 ,33 ,34 ,36 ,35
16 ,35 ,36 ,32 ,31
17 ,31 ,32 ,38 ,37
18 ,37 ,38 ,40 ,39
** Group 4 MatId 1 ProId 1
*ELEMENT, TYPE=S4, ELSET=Set_1_1
19 ,47 ,43 ,3 ,46
20 ,48 ,44 ,43 ,47
21 ,49 ,45 ,44 ,48
22 ,50 ,41 ,45 ,49
23 ,51 ,47 ,46 ,4
24 ,52 ,48 ,47 ,51
25 ,53 ,49 ,48 ,52
26 ,42 ,50 ,49 ,53
** Group 5 MatId 1 ProId 1
*ELEMENT, TYPE=S4, ELSET=Set_1_1
27 ,54 ,58 ,62 ,61
28 ,58 ,59 ,63 ,62
29 ,59 ,60 ,64 ,63
30 ,60 ,56 ,65 ,64
31 ,61 ,62 ,66 ,55
32 ,62 ,63 ,67 ,66
33 ,63 ,64 ,68 ,67
34 ,64 ,65 ,57 ,68
** Group 6 MatId 1 ProId 4
*ELEMENT, TYPE=S4, ELSET=Set_1_4
35 ,76 ,73 ,72 ,75
36 ,79 ,76 ,75 ,78
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** Group 7 MatId 1 ProId 1
*ELEMENT, TYPE=S4, ELSET=Set_1_1
52 ,70 ,69 ,44 ,52
53 ,53 ,45 ,69 ,70
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** Group 8 MatId 2 ProId 2
*ELEMENT, TYPE=S4, ELSET=Set_2_2
77 ,139 ,141 ,12 ,135
78 ,141 ,140 ,137 ,12
79 ,135 ,12 ,14 ,136
80 ,12 ,137 ,138 ,14
81 ,136 ,14 ,143 ,142
82 ,14 ,138 ,144 ,143
** Group 9 MatId 0 ProId 0
*ELEMENT, TYPE=SPRING2, ELSET=Set_0_0_celas1
91 , 95, 135
92 , 97, 136
93 , 98, 137
94 , 100, 138
*SPRING, ELSET=Set_0_0_celas1
1, 1
1.000000000000000e+12
*ELEMENT, TYPE=SPRING2, ELSET=Set_0_0_celas2
95 , 95, 135
96 , 97, 136
97 , 98, 137
98 , 100, 138
*SPRING, ELSET=Set_0_0_celas2
2, 2
1.000000000000000e+12
*ELEMENT, TYPE=SPRING2, ELSET=Set_0_0_celas3
99 , 95, 135
100 , 97, 136
101 , 98, 137
102 , 100, 138
*SPRING, ELSET=Set_0_0_celas3
3, 3
1.000000000000000e+12
*ELEMENT, TYPE=SPRING2, ELSET=Set_0_0_celas4
103 , 95, 135
104 , 97, 136
105 , 98, 137
106 , 100, 138
*SPRING, ELSET=Set_0_0_celas4
4, 4
1.000000000000000e+12
*ELEMENT, TYPE=SPRING2, ELSET=Set_0_0_celas5
107 , 95, 135
108 , 97, 136
109 , 98, 137
110 , 100, 138
*SPRING, ELSET=Set_0_0_celas5
5, 5
1.000000000000000e+12
** Group 10 MatId 0 ProId 0
*ELEMENT, TYPE=MASS, ELSET=Set_0_0_mass1_1
111 , 47
112 , 62
*MASS, ELSET=Set_0_0_mass1_1
2.000000000000000e-01, 2.000000000000000e-01, 2.000000000000000e-01
*ELEMENT, TYPE=MASS, ELSET=Set_0_0_mass1_2
113 , 31
114 , 32
*MASS, ELSET=Set_0_0_mass1_2
5.000000000000000e-01, 5.000000000000000e-01, 5.000000000000000e-01
****************************************
**                                    **
**                                    **
**	    BOUNDARY, LOAD CASE           **
**                                    **
**                                    **
****************************************
**************************************************************************
**                                    **
**                                    **
**          ELSET, MAT, PROP          **
**                                    **
**                                    **
****************************************
*ORIENTATION, NAME=global, SYSTEM=RECTANGULAR, DEFINITION=COORDINATES
1,0,0,0,1,0,0,0,0
*SHELL SECTION,ELSET=Set_1_1, SECTION INTEGRATION=SIMPSON,MATERIAL=GENERAL_ISOTROPIC_1
0.01
*SHELL SECTION,ELSET=Set_2_2, SECTION INTEGRATION=SIMPSON,MATERIAL=GENERAL_ISOTROPIC_2
0.016
*SHELL SECTION,ELSET=Set_1_3, SECTION INTEGRATION=SIMPSON,MATERIAL=GENERAL_ISOTROPIC_1
0.05
*SHELL SECTION,ELSET=Set_1_4, SECTION INTEGRATION=SIMPSON,MATERIAL=GENERAL_ISOTROPIC_1
0.011
**MATERIAL NAME=EMPTY_0 empty material
*MATERIAL,NAME=GENERAL_ISOTROPIC_1
*ELASTIC,TYPE=ISOTROPIC
7.2000000000e+10,3.4000000000e-01
*DENSITY
2.7000000000e+03
*MATERIAL,NAME=GENERAL_ISOTROPIC_2
*ELASTIC,TYPE=ISOTROPIC
2.1000000000e+11,2.9000000000e-01
*DENSITY
7.8000000000e+03
****************************************
**                                    **
**                                    **
**         RUNNING   COMMAND          **
**                                    **
**                                    **
****************************************
